// COMSOL Multiphysics 5.2.1.229 model "Proof1.mph"
// Outline of the model tree

Geometry
  geom1 "Geometry 1" (2D, length unit m)
    c1: Circle | r = 1
    r1: Rectangle | pos = {1, 2}; size = {6, 2}
    pol1: Polygon | source = table; table = {{3, 0}, {6, 1}, {2, -1.5}}
    r2: Rectangle | pos = {4, 2}; base = center; size = {20, 20}
    dif1: Difference | input = r2; input2 = c1, pol1, r1
    fin: Finalize "Form Union"

Physics
  es: Electrostatics on all domains
    dependent variable V
    d.d = 1
    PortSweepSettings.zref = 1000000[ohm]
    MeshControl.EnableMeshControl = 0
    ccn1: ChargeConservation (default) | epsilonr_mat = userdef; epsilonr = 1
    zc1: ZeroCharge (default)
    init1: init "Initial Values 1" (default)
    pot1: ElectricPotential on boundaries 1-3, 11
    pot2: ElectricPotential on boundaries 4-6, 10 | V0 = 1
    pot3: ElectricPotential on boundaries 7-9 | V0 = 2
    pot4: ElectricPotential on boundaries 12-15 | V0 = 3

Mesh
  mesh1 "Mesh 1" (physics-controlled)
    size: MeshSizeDefault | hauto = 1

Studies
  std1 "Study 1"
    stat: Stationary

Solver configurations
  sol1 "Solution 1" (study std1)
    v1: Variables "Dependent Variables 1"
    s1: Stationary "Stationary Solver 1"
      dDef: Direct
      fc1: FullyCoupled | linsolver = dDef

Datasets
  dset1: Solution | solution = sol1

Plots
  pg1: PlotGroup2D "Electric Potential (es)" | data = dset1
    surf1: Surface | expr = V
    arwl1: ArrowLine | expr = {es.Ex, es.Ey}; arrowcount = 2000
    con1: Contour | expr = V