// COMSOL Multiphysics 5.2.1.229 model "Proof2.mph"
// Outline of the model tree

Geometry
  geom1 "Geometry 1" (2D, length unit m)
    c1: Circle | r = 1
    r1: Rectangle | pos = {1, 2}; size = {6, 2}
    pol1: Polygon | source = table; table = {{3, 0}, {6, 1}, {2, -1.5}}
    r2: Rectangle | pos = {3, 1.25}; base = center; size = {25, 25}
    dif1: Difference | input = r2; input2 = c1, pol1, r1
    fin: Finalize "Form Union"

Physics
  es: Electrostatics on domains 1
    dependent variable V
    d.d = 1
    PortSweepSettings.zref = 50[ohm]
    MeshControl.EnableMeshControl = 0
    ccn1: ChargeConservation (default) | epsilonr_mat = userdef; epsilonr = 1
    zc1: ZeroCharge "Zero Charge Infinity" (default)
    init1: init "Initial Values 1" (default)
    pot2: ElectricPotential "Zero Field Infinity" (disabled) on boundaries 1-3, 11
    fp3: FloatingPotential "Floating potential Infinity" on boundaries 1-3, 11 | Group = 0
    fp2: FloatingPotential "Triangle Charge" on boundaries 7-9 | Q0 = 0.1*10e-9
    pot1: ElectricPotential "Rectangle Voltage" on boundaries 4-6, 10 | V0 = 1
    df1: DisplacementField "Disk Field" on boundaries 12-15 | D0 = {0, 2*8.85e-12, 0}; coordinateSystem = sys1

Mesh
  mesh1 "Mesh 1" (physics-controlled)
    size: MeshSizeDefault | hauto = 1

Studies
  std1 "Study 1"
    stat: Stationary

Solver configurations
  sol1 "Solution 1" (study std1)
    v1: Variables "Dependent Variables 1"
    s1: Stationary "Stationary Solver 1"
      dDef: Direct
      fc1: FullyCoupled | linsolver = dDef

Datasets
  dset1: Solution | solution = sol1

Plots
  pg1: PlotGroup2D "Electric Potential (es)" | data = dset1
    surf1: Surface | expr = V
    arwl1: ArrowLine | expr = {es.Ex, es.Ey}; arrowcount = 1000
    con1: Contour | expr = V
    arwl2: ArrowLine | expr = {es.Dx, es.Dy}; arrowcount = 2000