// COMSOL Multiphysics 5.2.1.262 model "Dz11_comsol.mph"
// Outline of the model tree

Geometry
  geom1 "Geometry 1" (2D, length unit m)
    pol1: Polygon | source = table; table = {{3, 0}, {6, 1}, {2, -1.5}}
    r1: Rectangle | pos = {1, 2}; size = {6, 2}
    c1: Circle | r = 1
    r2: Rectangle | pos = {3, 1.5}; type = solid; base = center; size = {20, 18}
    fin: Finalize "Form Union"

Materials
  mat1: Common "Copper" on domains 2-4
    def "Basic"
      relpermeability = 1
      electricconductivity = 5.998e7[S/m]
      heatcapacity = 385[J/(kg*K)]
      relpermittivity = 1
      emissivity = 0.5
      density = 8700[kg/m^3]
      thermalconductivity = 400[W/(m*K)]
    linzRes "Linearized resistivity"
      rho0 = 1.72e-8[ohm*m]
      alpha = 3.9e-3[1/K]
      Tref = 273.15[K]
  mat2: Common "Air" on domains 1
    def "Basic"
      relpermeability = 1
      relpermittivity = 1
      dynamicviscosity = eta(T[1/K])[Pa*s]
      ratioofspecificheat = 1.4
      electricconductivity = 0[S/m]
      heatcapacity = Cp(T[1/K])[J/(kg*K)]
      density = rho(pA[1/Pa],T[1/K])[kg/m^3]
      thermalconductivity = k(T[1/K])[W/(m*K)]
      soundspeed = cs(T[1/K])[m/s]
      eta: Piecewise | arg = T; extrap = constant; pieces = {200.0, 1600.0, -8.38278E-7+8.35717342E-8*T^1-7.69429583E-11*T^2+4.6437266E-14*T^3-1.06585607E-17*T^4}
      Cp: Piecewise | arg = T; extrap = constant; pieces = {200.0, 1600.0, 1047.63657-0.372589265*T^1+9.45304214E-4*T^2-6.02409443E-7*T^3+1.2858961E-10*T^4}
      rho: Analytic | expr = pA*0.02897/8.314/T; args = {pA, T}; dermethod = manual; argders = {{pA, d(pA*0.02897/8.314/T,pA)}, {T, d(pA*0.02897/8.314/T,T)}}
      k: Piecewise | arg = T; extrap = constant; pieces = {200.0, 1600.0, -0.00227583562+1.15480022E-4*T^1-7.90252856E-8*T^2+4.11702505E-11*T^3-7.43864331E-15*T^4}
      cs: Analytic | expr = sqrt(1.4*287*T); args = T; dermethod = manual; argders = {T, d(sqrt(1.4*287*T),T)}
    RefractiveIndex
      n = 1
      ki = 0

Physics
  es: Electrostatics on all domains
    dependent variable V
    ccn1: ChargeConservation (default)
    zc1: ZeroCharge (default)
    init1: init "Initial Values 1" (default)
    pot1: ElectricPotential "Electric Potential Rect" on boundaries 4-6, 10 | V0 = 2
    pot2: ElectricPotential "Electric Potential Disk" on boundaries 12-15 | V0 = 3
    pot3: ElectricPotential "Electric Potential Triangle" on boundaries 7-9 | V0 = 1
    scd1: SpaceChargeDensity on domains 2-4
    init2: init "Initial Values Rect" on domains 2 | V = 2
    init3: init "Initial Values tr" on domains 3 | V = 1
    init4: init "Initial Values Disk" on domains 4 | V = 3
    pot4: ElectricPotential on boundaries 1-3, 11 | V0 = 10.85/2/pi*log(sqrt((x-3.22)*(x-3.22)+(y-2.11)*(y-2.11)))

Mesh
  mesh1 "Mesh 1" (physics-controlled)
    size: MeshSizeDefault | hauto = 2

Studies
  std1 "Study 1"
    stat: Stationary

Solver configurations
  sol1 "Solution 1" (study std1)
    v1: Variables "Dependent Variables 1"
    s1: Stationary "Stationary Solver 1"
      dDef: Direct
      fc1: FullyCoupled | linsolver = dDef

Datasets
  dset1: Solution | solution = sol1

Plots
  pg1: PlotGroup2D "Electric Potential (es)" | data = dset1
    surf1: Surface | expr = V
  pg2: PlotGroup2D "2D Plot Group 2" | data = dset1
    arwl1: ArrowLine | data = dset1; expr = {es.Ex, es.Ey}; arrowlength = proportional; arrowcount = 1000
    line1: Line | data = dset1; expr = V

Exports
  plot1: Plot
    filename = /Users/timur/Documents/5 course/Мат. моделирование/11 семинар/dz11comsol/E.csv
    struct = spreadsheet
    sort = off
  plot2: Plot | filename = /Users/timur/Documents/5 course/Мат. моделирование/11 семинар/dz11comsol/V.csv
  plot3: Plot | filename = /Users/timur/Documents/5 course/Мат. моделирование/11 семинар/dz11comsol/v2d.csv